#-----------------------------------
# This file was generated by J-OCTA.
#-----------------------------------
#package gpu 1 neigh no

units	lj
atom_style	bond

boundary	p p p
box	tilt	large
#read_restart	in.restart
read_data	in.data
read_dump lammps_snap.100000000 100000000 x y z  vx vy vz


pair_style	lj/cut 1.122460
pair_coeff	* * 0.000000 0.000000 0.001000
pair_coeff	1 1 1.000000 1.000000 1.122460

neighbor	1.000000 bin
pair_modify	shift yes tail no
special_bonds	lj 0.000000 1.000000 1.000000 angle yes dihedral yes

timestep	0.006000

thermo_style	multi
thermo	10000
thermo_modify	norm no


#minimize 0.000000 300.000000 10000 100000
#reset_timestep 0

fix	1 all nve
fix	2 all langevin 1.00000 1.00000 2.000000 584287


# stress
compute temp all temp
compute pressure_total all pressure temp
compute pressure_bond all pressure temp bond angle dihedral improper
compute pressure_pair all pressure temp pair kspace
# stress (total) from pressure
variable st_total1 equal -c_pressure_total[1]
variable st_total2 equal -c_pressure_total[2]
variable st_total3 equal -c_pressure_total[3]
variable st_total4 equal -c_pressure_total[6]
variable st_total5 equal -c_pressure_total[5]
variable st_total6 equal -c_pressure_total[4]
# stress (bond)
variable st_bond1 equal -c_pressure_bond[1]
variable st_bond2 equal -c_pressure_bond[2]
variable st_bond3 equal -c_pressure_bond[3]
variable st_bond4 equal -c_pressure_bond[6]
variable st_bond5 equal -c_pressure_bond[5]
variable st_bond6 equal -c_pressure_bond[4]
# stress (non-bond)
variable st_pair1 equal -c_pressure_pair[1]
variable st_pair2 equal -c_pressure_pair[2]
variable st_pair3 equal -c_pressure_pair[3]
variable st_pair4 equal -c_pressure_pair[6]
variable st_pair5 equal -c_pressure_pair[5]
variable st_pair6 equal -c_pressure_pair[4]

#energy
variable etotal equal etotal
variable ekin equal ke
variable epot equal pe
variable ebond equal ebond
variable eangle equal eangle
variable etors equal edihed+eimp
variable enonbond equal evdwl
variable eele equal ecoul+elong

variable temp equal temp
variable density equal density
variable vol equal vol
variable cella equal cella
variable cellb equal cellb
variable cellc equal cellc
variable cellalpha equal cellalpha
variable cellbeta equal cellbeta
variable cellgamma equal cellgamma
variable press equal press

fix 3 all ave/time 10000 1 10000 v_etotal v_ekin v_epot v_ebond v_eangle v_etors v_enonbond v_eele v_temp v_density v_vol v_cella v_cellb v_cellc v_cellalpha v_cellbeta v_cellgamma v_press v_st_total1 v_st_total2 v_st_total3 v_st_total4 v_st_total5 v_st_total6 v_st_bond1 v_st_bond2 v_st_bond3 v_st_bond4 v_st_bond5 v_st_bond6 v_st_pair1 v_st_pair2 v_st_pair3 v_st_pair4 v_st_pair5 v_st_pair6 ave one file lammps_statistics.inst
fix 4 all ave/time 1 10000 10000 v_etotal v_ekin v_epot v_ebond v_eangle v_etors v_enonbond v_eele v_temp v_density v_vol v_cella v_cellb v_cellc v_cellalpha v_cellbeta v_cellgamma v_press v_st_total1 v_st_total2 v_st_total3 v_st_total4 v_st_total5 v_st_total6 v_st_bond1 v_st_bond2 v_st_bond3 v_st_bond4 v_st_bond5 v_st_bond6 v_st_pair1 v_st_pair2 v_st_pair3 v_st_pair4 v_st_pair5 v_st_pair6 ave one file lammps_statistics.batch
fix 5 all ave/time 1 10000 10000 v_etotal v_ekin v_epot v_ebond v_eangle v_etors v_enonbond v_eele v_temp v_density v_vol v_cella v_cellb v_cellc v_cellalpha v_cellbeta v_cellgamma v_press v_st_total1 v_st_total2 v_st_total3 v_st_total4 v_st_total5 v_st_total6 v_st_bond1 v_st_bond2 v_st_bond3 v_st_bond4 v_st_bond5 v_st_bond6 v_st_pair1 v_st_pair2 v_st_pair3 v_st_pair4 v_st_pair5 v_st_pair6 ave running file lammps_statistics.total

dump	1 all custom 20000 lammps_snap.* id type xs ys zs ix iy iz vx vy vz fx fy fz

run	100000000

write_restart in2.restart
